<?xml version="1.0" encoding="UTF-8"?>

<channelml xmlns="http://morphml.org/channelml/schema"
    xmlns:xsi="http://www.w3.org/2001/XMLSchema-instance"
    xmlns:meta="http://morphml.org/metadata/schema"
    xsi:schemaLocation="http://morphml.org/channelml/schema  http://www.neuroml.org/NeuroMLValidator/NeuroMLFiles/Schemata/v1.8.1/Level2/ChannelML_v1.8.1.xsd"
    units="SI Units">

    <meta:notes>Potassium channel, Hodgkin-Huxley style kinetics
	Kinetic rates roughly based on Sah et al. Hamill et al. (1991)</meta:notes>

    <channel_type name="kv">

		<status value="known_issues">
            <meta:issue> temperature adjustment improper (factor 'tadj' has to be added in conductance eq.) </meta:issue>
		</status>
		<!--
		<parameters>
			<parameter name="Ra" value ="20"/>
			<parameter name="Rb" value ="2"/>
			<parameter name="qa" value ="9e-3"/>
			<parameter name="tha" value =".025"/>
		</parameters>
        -->

        <current_voltage_relation cond_law="ohmic" ion="k" default_gmax="5" default_erev="-0.080">

            <q10_settings q10_factor="2.3" experimental_temp="23"/>

            <gate name="n" instances="1">
                <closed_state id="n0"/>
                <open_state id="n"/>
                <transition name="alpha" from="n0" to="n" expr_form="exp_linear" rate="180e-3" scale="9e-3" midpoint=".025" />
                <transition name="beta" from="n" to="n0" expr_form="exp_linear" rate="18e-3" scale="-9e-3" midpoint=".025" />
            </gate>

		</current_voltage_relation>

    </channel_type>
</channelml>
