<Lems xmlns="http://www.neuroml.org/lems/0.7.2" xmlns:xsi="http://www.w3.org/2001/XMLSchema-instance" xsi:schemaLocation="http://www.neuroml.org/lems/0.7.2  https://raw.githubusercontent.com/LEMS/LEMS/development/Schemas/LEMS/LEMS_v0.7.2.xsd">

    <Target component="sim1" reportFile="/home/padraig/git/VierlingClaassenEtAl2010/neuroConstruct/simulations/Sim_6/simulator.props" timesFile="/home/padraig/git/VierlingClaassenEtAl2010/neuroConstruct/simulations/Sim_6/time.dat"/>

        <!--Include standard NeuroML 2 ComponentType definitions-->

    <Include file="Cells.xml"/>
    <Include file="Networks.xml"/>
    <Include file="Simulation.xml"/>

        <!--Include the generated NeuroML 2 files-->

        <!--   Channel/synapse files-->
    <Include file="kv.channel.nml"/>
    <Include file="LeakConductance.channel.nml"/>
        <!--   Cell files-->
    <Include file="TestCell_kv.cell.nml"/>
        <!--   Network file-->
    <Include file="VierlingClaassenEtAl2010.net.nml"/>

        <!--Note: this could be: Simulation id="sim1" ... , but Component type="Simulation" ...
        is used to allow validation of this file according to the LEMS schema specified above...-->
    <Component type="Simulation" id="sim1" length="200.0ms" step="0.025ms" target="network_VierlingClaassenEtAl2010">

        <Display id="CellGroup_1_v" title="VierlingClaassenEtAl2010: Default Simulation Configuration, CellGroup_1, VOLTAGE" xmin="-0.020000001" xmax="0.22000001" ymin="-0.104" ymax="0.064" timeScale="1s">
            <Line id="v" timeScale="1s" quantity="CellGroup_1/0/TestCell_kv/v" scale="1 V" color="#000000"/>
        </Display>

        <Display id="GraphWin_1" title="VierlingClaassenEtAl2010: Default Simulation Configuration, CellGroup_1, kv:n" xmin="-0.020000001" xmax="0.22000001" ymin="-0.1" ymax="1.1" timeScale="1s">
            <Line id="kv_n" timeScale="1s" quantity="CellGroup_1/0/TestCell_kv/biophys/membraneProperties/kv_all/kv/n/q" scale="1" color="#000000"/>
        </Display>

        <OutputFile id="CellGroup_1_v_0_0_OF" fileName="/home/padraig/git/VierlingClaassenEtAl2010/neuroConstruct/simulations/Sim_6/CellGroup_1_0.0.dat">
            <OutputColumn id="v" quantity="CellGroup_1/0/TestCell_kv/v"/>
        </OutputFile>

        <OutputFile id="CellGroup_1_v_1_0_0_OF" fileName="/home/padraig/git/VierlingClaassenEtAl2010/neuroConstruct/simulations/Sim_6/CellGroup_1_0.0.kv_n.dat">
            <OutputColumn id="q" quantity="CellGroup_1/0/TestCell_kv/biophys/membraneProperties/kv_all/kv/n/q"/>
        </OutputFile>
    </Component>

</Lems>
